<?xml version="1.0"?>
<!--
  File:     rotax912is.xml
  Author:   Aleksey Matyushev

  Inputs:
    name:           Rotax 912is
    type:           piston
    power:          100.0 hp
    augmented?      no
    injected?       no
-->

<piston_engine name="rotax912is">
  <minmp unit="INHG">        19.0  </minmp>	<!-- Deprecated, taken from Rotax 912 UL operator's manual -->
  <maxmp unit="INHG">        27.5  </maxmp>	<!-- taken from Rotax 912 UL operator's manual -->
  <displacement unit="IN3">  82.6  </displacement>
  <maxhp>                   100.0  </maxhp>
  <bsfc>                      0.79 </bsfc> <!-- rough first cut from Google @ 75% power, needs to be validated -->
  <cycles>                    4.0  </cycles>
  <idlerpm>                3000.0  </idlerpm> <!-- gearbox ratio is book-kept in the prop.xml file -->
  <maxrpm>                 5800.0  </maxrpm> <!--  gearbox ratio is book-kept in the prop.xml file-->
  <maxthrottle>               1.0  </maxthrottle>
  <minthrottle>               0.1  </minthrottle>
  <sparkfaildrop>             0.1 </sparkfaildrop>
</piston_engine>
