<?xml version="1.0"?>

<propeller name="warpDrive">
	<ixx> 1.8 </ixx> <!-- NEED THIS VALUE -->
	<diameter unit="IN"> 60.0 </diameter>
	<numblades> 2 </numblades>
	<minpitch> 23 </minpitch> <!-- ASSUME THIS IS A FIXED PROPELLER -->
	<maxpitch> 23 </maxpitch> <!-- ASSUME THIS IS A FIXED PROPELLER -->
	<gearratio> 0.41 </gearratio> <!-- THIS IS THE GEAR RATION FROM THE ROTAX912is GEARBOX 1/2.43 -->

	<!-- EITHER USE THE GENERIC STUFF OR GET IN TOUCH WITH warpDrive -->
	<table name="C_THRUST" type="internal">
		<tableData>
			0.0 0.0462
			0.1 0.0443
			0.2 0.0424
			0.3 0.0390
			0.4 0.0350
			0.5 0.0308
			0.6 0.0249
			0.7 0.0189
			0.8 0.0102
			1.0 -0.0035
			1.2 -0.0182
			1.4 -0.0327
		</tableData>
	</table>


	<table name="C_POWER" type="internal">
		<tableData>
			0.0 0.0310
			0.1 0.0310
			0.2 0.0303
			0.3 0.0295
			0.4 0.0278
			0.5 0.0255
			0.6 0.0234
			0.7 0.0197
			0.8 0.0161
			1.0 0.0057
			1.2 -0.0092
			1.4 -0.0276
			1.6 -0.0468
		</tableData>
	</table>

	<!-- thrust effects of helical tip Mach -->
	<table name="CT_MACH" type="internal">
		<tableData>
			0.85 1.0
			1.05 0.8
		</tableData>
	</table>

	<!-- power-required effects of helical tip Mach -->
	<table name="CP_MACH" type="internal">
		<tableData>
			0.85 1.0
			1.05 1.8
			2.00 1.4
		</tableData>
	</table>
</propeller>
