<?xml version="1.0"?>
<!-- This is the JSBSim config file started out as the jsbsim model for the
	eve airplane. That config file was derived from jsbsim example for a PA Seneca.
	The reason this config file was chosen as a starting point was because it
	had elements of RC jand a pusher aircraft, making it easy to adapt to both
	the 6 and 30ft prototypes. AM 7/16/16 Original sections of this file were
	generated by datcom using as much real input as available. Changes from datcom.xml
	- function attribute NAME must be lowercase - missing function Delta_lift_due_to_flap_deflection
	in axis LIFT - missing function Lift_due_to_Elevator_Deflection in axis LIFT -->

<!-- THIS IS THE CHANGE LOG FOR THE JSB SIM MODEL
	1.) Changed header
	2.) Updated fdm_config and fileheader tags
	3.) Added the cross inertias and set them to 0
	4.) Compared the file with the c172 JSBsim model and added functions
	wherever appropriate.  Removed RC like functions and replaced wtih c172 data.

	-->


<?xml-stylesheet href="JSBSim.xsl" type="application/xml"?>
<fdm_config xmlns:xsi="http://www.w3.org/2001/XMLSchema-instance"
	name="eve" version="1.0" release="ALPHA">

	<fileheader>
		<author>Natilus</author>
		<filecreationdate>7-16-16</filecreationdate>
		<description>Eve JSBSim Flight Dynamics Model</description>
		<reference title="Eve JSBSim Flight Dynamics Model" />
	</fileheader>

	<!-- THIS SECTION DOES NOT EXIST IN THE C172p file -->
	<output name="eve_datalog.csv" rate="60" type="CSV">
		<property> aero/qbar-psf </property>
		<property> attitude/phi-rad </property>
		<property> position/h-sl-ft </property>
		<property> velocities/vc-kts </property>
		<property> fcs/throttle-cmd-norm </property>
		<property> fcs/elevator-pos-norm </property>
		<rates> ON </rates>
		<velocities> ON </velocities>
		<forces> ON </forces>
		<moments> ON </moments>
		<position> ON </position>
		<propulsion> OFF </propulsion>
		<aerosurfaces> OFF </aerosurfaces>
		<fcs> OFF </fcs>
		<ground_reactions> ON </ground_reactions>
	</output>

	<metrics>
		<wingarea unit="FT2"> 2.2792  </wingarea>
		<wingspan unit="FT"> 4.5000  </wingspan>
		<chord unit="FT"> .5606  </chord>
		<htailarea unit="FT2"> .4457  </htailarea>
		<htailarm unit="FT"> .4280  </htailarm>
		<vtailarea unit="FT2"> .1606  </vtailarea>
		<vtailarm unit="FT"> .7127  </vtailarm>
		<!-- the aerodynamic reference point, common point for aerodynamic forces
			(lift and drag) -->
		<location name="AERORP" unit="IN">
			<x> 4.0 </x>
			<y> 0.0 </y>
			<z> 0.0 </z>
		</location>
		<!-- the eyepoint of the pilot (needs to be of the camera) -->
		<location name="EYEPOINT" unit="IN">
			<x> 0.0 </x>
			<y> 0.0 </y>
			<z> 0.0 </z>
		</location>
		<!-- the visual reference point of the 3d model -->
		<location name="VRP" unit="IN">
			<x> 0.0 </x>
			<y> 0.0 </y>
			<z> 0.0 </z>
		</location>
	</metrics>

	<mass_balance>
		<!-- C172 model only has ixx,iyy, and izz -->
		<ixx unit="SLUG*FT2"> .1 </ixx>
		<iyy unit="SLUG*FT2"> .1 </iyy>
		<izz unit="SLUG*FT2"> .1 </izz>
		<ixy unit="SLUG*FT2"> 0 </ixy>
		<ixz unit="SLUG*FT2"> 0 </ixz>
		<iyz unit="SLUG*FT2"> 0 </iyz>
		<emptywt unit="LBS"> 2.0 </emptywt>
		<!-- the center of gravity -->
		<location name="CG" unit="IN">
			<x> 3.0 </x>
			<y> 0.0 </y>
			<z> 0.0 </z>
		</location>

		<pointmass name="ballast">
			<weight unit="LBS"> 180 </weight>
			<location name="POINTMASS" unit="IN">
				<x> 36 </x>
				<y> -14 </y>
				<z> 24 </z>
			</location>
		</pointmass>
		<pointmass name="payload">
			<weight unit="LBS"> 0 </weight>
			<location name="POINTMASS" unit="IN">
				<x> 36 </x>
				<y> 14 </y>
				   
				<z> 24 </z>
			</location>
		</pointmass>
		<!-- not sure fuel belongs in this section, have to revisit -->
		<pointmass name="Left Fuel">
			<weight unit="LBS"> 0 </weight>
			<location name="POINTMASS" unit="IN">
				<x> 70 </x>
				<y> -14 </y>
				   
				<z> 24 </z>
			</location>
		</pointmass>
		<pointmass name="Right Fuel">
			<weight unit="LBS"> 0 </weight>
			<location name="POINTMASS" unit="IN">
				   
				<x> 70 </x>
				               
				<y> 14 </y>
				               
				<z> 24 </z>
				           
			</location>
		</pointmass>
	</mass_balance>

	<!-- this part will be interesting - have to think on how to do this part,
		might consult the forums. For now, going to wipe the original and put in
		the C172 data, feels like it's more realistic -->
	<ground_reactions>
		<contact type="BOGEY" name="NOSE">
			<location unit="IN">
				<x> -6.8 </x>
				<y> 0 </y>
				<z> -20 </z>
			</location>
			<static_friction> 0.8 </static_friction>
			<dynamic_friction> 0.5 </dynamic_friction>
			<rolling_friction> 0.02 </rolling_friction>
			<spring_coeff unit="LBS/FT"> 1800 </spring_coeff>
			<damping_coeff unit="LBS/FT/SEC"> 600 </damping_coeff>
			<max_steer unit="DEG"> 10 </max_steer>
			<brake_group> NONE </brake_group>
			<retractable>0</retractable>
		</contact>
		<contact type="BOGEY" name="LEFT_MAIN">
			<location unit="IN">
				<x> 58.2 </x>
				<y> -43 </y>
				<z> -17.9 </z>
			</location>
			<static_friction> 0.8 </static_friction>
			<dynamic_friction> 0.5 </dynamic_friction>
			<rolling_friction> 0.02 </rolling_friction>
			<spring_coeff unit="LBS/FT"> 5400 </spring_coeff>
			<damping_coeff unit="LBS/FT/SEC"> 1600 </damping_coeff>
			<max_steer unit="DEG"> 0.0 </max_steer>
			<brake_group> LEFT </brake_group>
			<retractable>0</retractable>
		</contact>
		<contact type="BOGEY" name="RIGHT_MAIN">
			<location unit="IN">
				<x> 58.2 </x>
				<y> 43 </y>
				<z> -17.9 </z>
			</location>
			<static_friction> 0.8 </static_friction>
			<dynamic_friction> 0.5 </dynamic_friction>
			<rolling_friction> 0.02 </rolling_friction>
			<spring_coeff unit="LBS/FT"> 5400 </spring_coeff>
			<damping_coeff unit="LBS/FT/SEC"> 1600 </damping_coeff>
			<max_steer unit="DEG"> 0.0 </max_steer>
			<brake_group> RIGHT </brake_group>
			<retractable>0</retractable>
		</contact>
		<contact type="BOGEY" name="TAIL_SKID">
			<location unit="IN">
				<x> 188 </x>
				<y> 0 </y>
				<z> 8 </z>
			</location>
			<static_friction> 0.2 </static_friction>
			<dynamic_friction> 0.2 </dynamic_friction>
			<rolling_friction> 0.2 </rolling_friction>
			<spring_coeff unit="LBS/FT"> 20000 </spring_coeff>
			<damping_coeff unit="LBS/FT/SEC"> 1000 </damping_coeff>
			<max_steer unit="DEG"> 0.0 </max_steer>
			<brake_group> NONE </brake_group>
			<retractable>0</retractable>
		</contact>
		<contact type="BOGEY" name="LEFT_TIP">
			<location unit="IN">
				<x> 43.2 </x>
				<y> -214.8 </y>
				<z> 59.4 </z>
			</location>
			<static_friction> 0.2 </static_friction>
			<dynamic_friction> 0.2 </dynamic_friction>
			<rolling_friction> 0.2 </rolling_friction>
			<spring_coeff unit="LBS/FT"> 10000 </spring_coeff>
			<damping_coeff unit="LBS/FT/SEC"> 2000 </damping_coeff>
			<max_steer unit="DEG"> 0.0 </max_steer>
			<brake_group> NONE </brake_group>
			<retractable>0</retractable>
		</contact>
		<contact type="BOGEY" name="RIGHT_TIP">
			<location unit="IN">
				<x> 43.2 </x>
				<y> 214.8 </y>
				<z> 59.4 </z>
			</location>
			<static_friction> 0.2 </static_friction>
			<dynamic_friction> 0.2 </dynamic_friction>
			<rolling_friction> 0.2 </rolling_friction>
			<spring_coeff unit="LBS/FT"> 10000 </spring_coeff>
			<damping_coeff unit="LBS/FT/SEC"> 2000 </damping_coeff>
			<max_steer unit="DEG"> 0.0 </max_steer>
			<brake_group> NONE </brake_group>
			<retractable>0</retractable>
		</contact>
	</ground_reactions>

	<!-- need to spend some time on this part. All engine files are loacted
		under the engine folder. There are generic prop tables and engines which
		are more big airplane like, so those can be altered for our Rotax 912 + propeller
		combo also seems like a couple of the tags are missing from this file when
		compared to the c172 -->
	<propulsion>
		<engine file="HB2815-2000">
			<location unit="IN">
				<x> 10.0 </x>
				<y> 0 </y>
				<z> 3.0 </z>
			</location>
			<orient unit="DEG">
				<roll> 0.0 </roll>
				<pitch> -5 </pitch>
				<yaw> 0 </yaw>
			</orient>
			<feed>0</feed>
			<thruster file="apc6x4">
				<location unit="IN">
					<x> 10.0 </x>
					<y> 0 </y>
					<z> 3.0 </z>
				</location>
				<orient unit="DEG">
					<roll> 0.0 </roll>
					<pitch> -5.0 </pitch>
					<yaw> 0.0 </yaw>
				</orient>
				<p_factor>1.0</p_factor>
			</thruster>
		</engine>

		<!--the original section was removed and filled in with the c172 information -->
		<tank type="FUEL">    <!-- Tank number 0 -->
			<location unit="IN">
				<x> 56 </x>
				<y> -112 </y>
				<z> 59.4 </z>
			</location>
			<capacity unit="LBS"> 185 </capacity>
			<contents unit="LBS"> 100 </contents>
		</tank>
		<tank type="FUEL">    <!-- Tank number 1 -->
			<location unit="IN">
				<x> 56 </x>
				<y> 112 </y>
				<z> 59.4 </z>
			</location>
			<capacity unit="LBS"> 185 </capacity>
			<contents unit="LBS"> 100 </contents>
		</tank>
	</propulsion>

	<!--this is the 'flight control system' (FCS) section of the code which
		is essentially the autopilot schema -->
	<flight_control name="eve">
		<!-- Elevator -->
		<channel name="Pitch">
			<summer name="Pitch Trim Sum">
				<input>fcs/elevator-cmd-norm</input>
				<input>fcs/pitch-trim-cmd-norm</input>
				<clipto>
					<min>-1</min>
					<max>1</max>
				</clipto>
				<output>fcs/elevator-pos-norm</output>
			</summer>
			<aerosurface_scale name="Elevator Control">
				<input>fcs/pitch-trim-sum</input>
				<gain>0.01745</gain>
				<range>
					<min>-28</min>
					<max>23</max>
				</range>
				<output>fcs/elevator-pos-rad</output>
			</aerosurface_scale>

			<!-- Adding a section from the c172 code not quite sure what it means
				yet, but need to examine -->
			<aerosurface_scale name="Elevator Position Normalized">
				<input>fcs/elevator-pos-deg</input>
				<domain>
					<min>-28</min>
					<max>23</max>
				</domain>
				<range>
					<min>-1</min>
					<max>1</max>
				</range>
				<output>fcs/elevator-pos-norm</output>
			</aerosurface_scale>
		</channel>

		<!-- Roll axis was not included in the original model since it mixed roll/yaw
			in the rudder. Copying/pasting the code for roll from the c172 file -->
		<channel name="Roll">
			<summer name="Roll Trim Sum">
				<input>fcs/aileron-cmd-norm</input>
				<input>fcs/roll-trim-cmd-norm</input>
				<clipto>
					<min>-1</min>
					<max>1</max>
				</clipto>
			</summer>

			<aerosurface_scale name="Left Aileron Control">
				<input>fcs/roll-trim-sum</input>
				<gain>0.01745</gain>
				<range>
					<min>-20</min>
					<max>15</max>
				</range>
				<output>fcs/left-aileron-pos-rad</output>
			</aerosurface_scale>

			<aerosurface_scale name="Left Aileron Position Normalized">
				<input>fcs/left-aileron-pos-deg</input>
				<domain>
					<min>-20</min>
					<max>15</max>
				</domain>
				<range>
					<min>-1</min>
					<max>1</max>
				</range>
				<output>fcs/left-aileron-pos-norm</output>
			</aerosurface_scale>

			<aerosurface_scale name="Right Aileron Control">
				<input>fcs/roll-trim-sum</input>
				<gain>-0.01745</gain>
				<range>
					<min>-20</min>
					<max>15</max>
				</range>
				<output>fcs/right-aileron-pos-rad</output>
			</aerosurface_scale>

			<aerosurface_scale name="Right Aileron Position Normalized">
				<input>fcs/right-aileron-pos-deg</input>
				<domain>
					<min>-15</min>
					<max>20</max>
				</domain>
				<range>
					<min>1</min>
					<max>-1</max>
				</range>
				<output>fcs/right-aileron-pos-norm</output>
			</aerosurface_scale>
		</channel>

		<!-- Rudder -->
		<channel name="Yaw">
			<summer name="Yaw Trim Sum">
				<input>fcs/rudder-cmd-norm</input>
				<input>fcs/yaw-trim-cmd-norm</input>
				<clipto>
					<min>-1</min>
					<max>1</max>
				</clipto>
			</summer>

			<!--in the original file, there is an example of an aileron/rudder mixer,
				however that has been removed since there are dedicated control surfaces
				for each for the moment. There might need to be a mixes if we need some aileron-rudder
				inter-connect -->


			<aerosurface_scale name="Rudder Control">
				<input>fcs/yaw-mix</input>
				<gain>0.01745</gain>
				<range>
					<min>-27</min>
					<max>27</max>
				</range>
				<output>fcs/rudder-pos-rad</output>
			</aerosurface_scale>

			<aerosurface_scale name="Rudder Position Normalized">
				<input>fcs/rudder-pos-deg</input>
				<domain>
					<min>-16</min>
					<max>16</max>
				</domain>
				<range>
					<min>-1</min>
					<max>1</max>
				</range>
				<output>fcs/rudder-pos-norm</output>
			</aerosurface_scale>
		</channel>
		<!-- Throttle (linear vs rpm approx.) This is interesting. The c172 does
			not have this section, but it makes sense that the throttle is an fcs chanel,
			so we will keep this code for right now. I think we already have all the
			performance charts for the 912is so we can tune this section based on PLA
			or TLA. -->
		<channel name="Throttle">
			<fcs_function name="fcs/rpm-scaled-throttle">
				<function>
					<pow>
						<property>fcs/throttle-cmd-norm</property>
						<value>3</value>
					</pow>
				</function>
			</fcs_function>
			<aerosurface_scale name="Throttle Control">
				<input>fcs/rpm-scaled-throttle</input>
				<range>
					<min>-1</min>
					<max>1</max>
				</range>
				<output>fcs/throttle-pos-norm</output>
			</aerosurface_scale>
		</channel>
	</flight_control>

	<aerodynamics>
		<!-- so this is the alpha max data that will be generated from CFD and
			put a 10% margin on, no reason this thing will ever stall. Question though,
			might need an AOA vane for stall protection though autopilot pitch attitude
			won't be able to see this. -->
		<alphalimits unit="DEG">
			<min> -16.00    </min>
			<max> 24.00    </max>
		</alphalimits>

		<!-- the c172 also has a hysteresist limit set here, copying and pasting
			that for further investigation. -->
		<hysteresis_limits unit="RAD">
			<min>0.09</min>
			<max>0.36</max>
		</hysteresis_limits>

		<!-- This section is leftover from the previous aircraft, we will keep
			the sign conventions the same for the moment as well as the comments -->

		<!-- ************************* Sign Conventions *************************
			Control displacements Stick FWD + / Aft - Stick Left + / Right - Wheel CCW
			+ / CW - Pedal Left + / Right - Elevator trim Nose Up + / Nose down - Surfaces
			Elevator TED + / TEU - R Ail TED + / TEU - L Ail TED + / TEU - Rudder TEL
			+ / TER - F&M, Accel, Rates, Displacements Pitch Up + / Down - Roll Rgt +
			/ Left - Yaw Rgt + / Left - Other Alpha Up + / Down - Beta Wind in right
			ear + / Wind in left ear - Slip Ball right of center + / left of center - -->

		<!-- ************************************** ASSUMPTIONS AND LIMITATIONS
			There is no interaction between deflected surfaces modeled so there is no
			change in elevator effects with the flaps deflected, for example. Terms known
			to be missing from DATCOM: Power effects Ground effects Cyr, CyDr, Cyda,
			ClDr, Cndr ************************************** -->


		<!-- Aleksey is going to change the tables below to more closely match
			the C172 so we can start thinking big airplanes instead of small, although
			the changes appear to be more in the language so small. -->


		<function name="aero/function/kCDge">
			<description>Change_in_drag_due_to_ground_effect</description>
			<product>
				<table>
					<independentVar>aero/h_b-mac-ft</independentVar>
					<tableData>
						0.0000 0.0480
						0.1000 0.5150
						0.1500 0.6290
						0.2000 0.7090
						0.3000 0.8150
						0.4000 0.8820
						0.5000 0.9280
						0.6000 0.9620
						0.7000 0.9880
						0.8000 1.0000
						0.9000 1.0000
						1.0000 1.0000
						1.1000 1.0000
					</tableData>
				</table>
			</product>
		</function>

		<function name="aero/function/kCLge">
			<description>Change_in_lift_due_to_ground_effect</description>
			<product>
				<table>
					<independentVar>aero/h_b-mac-ft</independentVar>
					<tableData>
						0.0000 1.2030
						0.1000 1.1270
						0.1500 1.0900
						0.2000 1.0730
						0.3000 1.0460
						0.4000 1.0550
						0.5000 1.0190
						0.6000 1.0130
						0.7000 1.0080
						0.8000 1.0060
						0.9000 1.0030
						1.0000 1.0020
						1.1000 1.0000
					</tableData>
				</table>
			</product>
		</function>

		<!-- the original lift tables were completely taken out and replaced by
			the c172 ones since they had a lot of left-out variables -->
		<axis name="LIFT">
			<function name="aero/coefficient/CLwbh">
				<description>Lift_due_to_alpha</description>
				<product>
					<property>aero/qbar-psf</property>
					<property>metrics/Sw-sqft</property>
					<!-- need to check why CLwbh references kCLge -->
					<property>aero/function/kCLge</property>
					<table>
						<independentVar lookup="row">aero/alpha-rad</independentVar>
						<independentVar lookup="column">aero/stall-hyst-norm</independentVar>
						<tableData>
							0.0000 1.0000
							-0.0900 -0.2200 -0.2200
							0.0000 0.2500
							0.2500
							0.0900 0.7300 0.7300
							0.1000 0.8300 0.7800
							0.1200 0.9200
							0.7900
							0.1400 1.0200 0.8100
							0.1600 1.0800 0.8200
							0.1700 1.1300
							0.8300
							0.1900 1.1900 0.8500
							0.2100 1.2500 0.8600
							0.2400 1.3500
							0.8800
							0.2600 1.4400 0.9000
							0.2800 1.4700 0.9200
							0.3000 1.4300
							0.9500
							0.3200 1.3800 0.9900
							0.3400 1.3000 1.0500
							0.3600 1.1500
							1.1500
						</tableData>
					</table>
				</product>
			</function>
			<function name="aero/coefficient/CLDf">
				<description>Delta_lift_due_to_flap_deflection</description>
				<product>
					<property>aero/qbar-psf</property>
					<property>metrics/Sw-sqft</property>
					<property>aero/function/kCLge</property>
					<table>
						<independentVar>fcs/flap-pos-deg</independentVar>
						<tableData>
							0.0000 0.0000
							10.0000 0.2000
							20.0000 0.3000
							30.0000 0.3500
						</tableData>
					</table>
				</product>
			</function>
			<function name="aero/coefficient/CLDe">
				<description>Lift_due_to_Elevator_Deflection</description>
				<product>
					<property>aero/qbar-psf</property>
					<property>metrics/Sw-sqft</property>
					<property>fcs/elevator-pos-rad</property>
					<value>0.4300</value>
				</product>
			</function>
			<function name="aero/coefficient/CLadot">
				<description>Lift_due_to_alpha_rate</description>
				<product>
					<property>aero/qbar-psf</property>
					<property>metrics/Sw-sqft</property>
					<property>aero/alphadot-rad_sec</property>
					<property>aero/ci2vel</property>
					<value>1.7000</value>
				</product>
			</function>
			<function name="aero/coefficient/CLq">
				<description>Lift_due_to_pitch_rate</description>
				<product>
					<property>aero/qbar-psf</property>
					<property>metrics/Sw-sqft</property>
					<property>velocities/q-aero-rad_sec</property>
					<property>aero/ci2vel</property>
					<value>3.9000</value>
				</product>
			</function>
		</axis>


		<!-- so the original drag section appears to be very amateur, there is
			no CDo data. So the original section is replaced by the C172 data below -->
		<axis name="DRAG">
			<function name="aero/coefficient/CDo">
				<description>Drag_at_zero_lift</description>
				<product>
					<property>aero/qbar-psf</property>
					<property>metrics/Sw-sqft</property>
					<value>0.027</value>
				</product>
			</function>
			<function name="aero/coefficient/CDDf">
				<description>Delta_drag_due_to_flap_deflection</description>
				<product>
					<property>aero/qbar-psf</property>
					<property>metrics/Sw-sqft</property>
					<property>aero/function/kCDge</property>
					<table>
						<independentVar>fcs/flap-pos-deg</independentVar>
						<tableData>
							0.0000 0.0000
							10.0000 0.0070
							20.0000 0.0120
							30.0000 0.0180
						</tableData>
					</table>
				</product>
			</function>
			<function name="aero/coefficient/CDwbh">
				<description>Drag_due_to_alpha</description>
				<product>
					<property>aero/qbar-psf</property>
					<property>metrics/Sw-sqft</property>
					<property>aero/function/kCDge</property>
					<table>
						<independentVar lookup="row">aero/alpha-rad</independentVar>
						<independentVar lookup="column">fcs/flap-pos-deg</independentVar>
						<tableData>
							0.0000 10.0000 20.0000 30.0000
							-0.0873 0.0041 0.0000
							0.0005 0.0014
							-0.0698 0.0013 0.0004 0.0025 0.0041
							-0.0524 0.0001
							0.0023 0.0059 0.0084
							-0.0349 0.0003 0.0057 0.0108 0.0141
							-0.0175
							0.0020 0.0105 0.0172 0.0212
							0.0000 0.0052 0.0168 0.0251 0.0299
							0.0175 0.0099 0.0248 0.0346 0.0402
							0.0349 0.0162 0.0342 0.0457
							0.0521
							0.0524 0.0240 0.0452 0.0583 0.0655
							0.0698 0.0334 0.0577
							0.0724 0.0804
							0.0873 0.0442 0.0718 0.0881 0.0968
							0.1047 0.0566
							0.0874 0.1053 0.1148
							0.1222 0.0706 0.1045 0.1240 0.1343
							0.1396
							0.0860 0.1232 0.1442 0.1554
							0.1571 0.0962 0.1353 0.1573 0.1690
							0.1745 0.1069 0.1479 0.1708 0.1830
							0.1920 0.1180 0.1610 0.1849
							0.1975
							0.2094 0.1298 0.1746 0.1995 0.2126
							0.2269 0.1424 0.1892
							0.2151 0.2286
							0.2443 0.1565 0.2054 0.2323 0.2464
							0.2618 0.1727
							0.2240 0.2521 0.2667
							0.2793 0.1782 0.2302 0.2587 0.2735
							0.2967
							0.1716 0.2227 0.2507 0.2653
							0.3142 0.1618 0.2115 0.2388 0.2531
							0.3316 0.1475 0.1951 0.2214 0.2351
							0.3491 0.1097 0.1512 0.1744
							0.1866
						</tableData>
					</table>
				</product>
			</function>
			<function name="aero/coefficient/CDDe">
				<description>Drag_due_to_Elevator_Deflection</description>
				<product>
					<property>aero/qbar-psf</property>
					<property>metrics/Sw-sqft</property>
					<property>fcs/mag-elevator-pos-rad</property>
					<value>0.0000</value>
				</product>
			</function>
			<function name="aero/coefficient/CDbeta">
				<description>Drag_due_to_sideslip</description>
				<product>
					<property>aero/qbar-psf</property>
					<property>metrics/Sw-sqft</property>
					<property>aero/mag-beta-rad</property>
					<value>0.1700</value>
				</product>
			</function>
		</axis>

		<!-- This original section looks weird as well. It has been replaced by
			the C172 YAW/SIDE force section. -->
		<axis name="YAW">
			<function name="aero/coefficient/Cnb">
				<description>Yaw_moment_due_to_beta</description>
				<product>
					<property>aero/qbar-psf</property>
					<property>metrics/Sw-sqft</property>
					<property>metrics/bw-ft</property>
					<table>
						<independentVar>aero/beta-rad</independentVar>
						<tableData>
							-0.3490 -0.0205
							0.0000 0.0000
							0.3490 0.0205
						</tableData>
					</table>
				</product>
			</function>
			<function name="aero/coefficient/Cnp">
				<description>Yaw_moment_due_to_roll_rate</description>
				<product>
					<property>aero/qbar-psf</property>
					<property>metrics/Sw-sqft</property>
					<property>metrics/bw-ft</property>
					<property>aero/bi2vel</property>
					<property>velocities/p-aero-rad_sec</property>
					<value>-0.0278</value>
				</product>
			</function>
			<function name="aero/coefficient/Cnr">
				<description>Yaw_moment_due_to_yaw_rate</description>
				<product>
					<property>aero/qbar-psf</property>
					<property>metrics/Sw-sqft</property>
					<property>metrics/bw-ft</property>
					<property>aero/bi2vel</property>
					<property>velocities/r-aero-rad_sec</property>
					<value>-0.0937</value>
				</product>
			</function>
			<function name="aero/coefficient/Cnda">
				<description>Yaw_moment_due_to_aileron</description>
				<product>
					<property>aero/qbar-psf</property>
					<property>metrics/Sw-sqft</property>
					<property>metrics/bw-ft</property>
					<property>fcs/left-aileron-pos-rad</property>
					<value>-0.0053</value>
				</product>
			</function>
			<function name="aero/coefficient/Cndr">
				<description>Yaw_moment_due_to_rudder</description>
				<product>
					<property>aero/qbar-psf</property>
					<property>metrics/Sw-sqft</property>
					<property>metrics/bw-ft</property>
					<property>fcs/rudder-pos-rad</property>
					<value>-0.0430</value>
				</product>
			</function>
		</axis>

		<!-- the original section here also appears to be lacking a bunch of variables.
			It has been replaced by the c172 section. -->
		<axis name="ROLL">
			<function name="aero/coefficient/Clb">
				<description>Roll_moment_due_to_beta</description>
				<product>
					<property>aero/qbar-psf</property>
					<property>metrics/Sw-sqft</property>
					<property>metrics/bw-ft</property>
					<table>
						<independentVar>aero/beta-rad</independentVar>
						<tableData>
							-0.3490 0.0322
							0.0000 0.0000
							0.3490 -0.0322
						</tableData>
					</table>
				</product>
			</function>
			<function name="aero/coefficient/Clp">
				<description>Roll_moment_due_to_roll_rate_(roll_damping)</description>
				<product>
					<property>aero/qbar-psf</property>
					<property>metrics/Sw-sqft</property>
					<property>metrics/bw-ft</property>
					<property>aero/bi2vel</property>
					<property>velocities/p-aero-rad_sec</property>
					<value>-0.4840</value>
				</product>
			</function>
			<function name="aero/coefficient/Clr">
				<description>Roll_moment_due_to_yaw_rate</description>
				<product>
					<property>aero/qbar-psf</property>
					<property>metrics/Sw-sqft</property>
					<property>metrics/bw-ft</property>
					<property>aero/bi2vel</property>
					<property>velocities/r-aero-rad_sec</property>
					<table>
						<independentVar lookup="row">aero/alpha-rad</independentVar>
						<independentVar lookup="column">fcs/flap-pos-deg</independentVar>
						<tableData>
							0.0000 30.0000
							0.0000 0.0798 0.1246
							0.0940 0.1869 0.2317
						</tableData>
					</table>
				</product>
			</function>
			<function name="aero/coefficient/ClDa">
				<description>Roll_moment_due_to_aileron</description>
				<product>
					<property>aero/qbar-psf</property>
					<property>metrics/Sw-sqft</property>
					<property>metrics/bw-ft</property>
					<property>fcs/left-aileron-pos-rad</property>
					<value>0.2290</value>
				</product>
			</function>
			<function name="aero/coefficient/Cldr">
				<description>Roll_moment_due_to_rudder</description>
				<product>
					<property>aero/qbar-psf</property>
					<property>metrics/Sw-sqft</property>
					<property>metrics/bw-ft</property>
					<property>fcs/rudder-pos-rad</property>
					<value>0.0147</value>
				</product>
			</function>
		</axis>

		<axis name="PITCH">
			<function name="aero/coefficient/Cmo">
				<description>Pitching_moment_at_zero_alpha</description>
				<product>
					<property>aero/qbar-psf</property>
					<property>metrics/Sw-sqft</property>
					<property>metrics/cbarw-ft</property>
					<value>0.1000</value>
				</product>
			</function>
			<function name="aero/coefficient/Cmalpha">
				<description>Pitch_moment_due_to_alpha</description>
				<product>
					<property>aero/qbar-psf</property>
					<property>metrics/Sw-sqft</property>
					<property>metrics/cbarw-ft</property>
					<property>aero/alpha-rad</property>
					<value>-1.8000</value>
				</product>
			</function>
			<function name="aero/coefficient/Cmq">
				<description>Pitch_moment_due_to_pitch_rate</description>
				<product>
					<property>aero/qbar-psf</property>
					<property>metrics/Sw-sqft</property>
					<property>metrics/cbarw-ft</property>
					<property>aero/ci2vel</property>
					<property>velocities/q-aero-rad_sec</property>
					<value>-12.4000</value>
				</product>
			</function>
			<function name="aero/coefficient/Cmadot">
				<description>Pitch_moment_due_to_alpha_rate</description>
				<product>
					<property>aero/qbar-psf</property>
					<property>metrics/Sw-sqft</property>
					<property>metrics/cbarw-ft</property>
					<property>aero/ci2vel</property>
					<property>aero/alphadot-rad_sec</property>
					<value>-7.2700</value>
				</product>
			</function>
			<function name="aero/coefficient/Cmde">
				<description>Pitch_moment_due_to_elevator_deflection</description>
				<product>
					<property>aero/qbar-psf</property>
					<property>metrics/Sw-sqft</property>
					<property>metrics/cbarw-ft</property>
					<property>fcs/elevator-pos-rad</property>
					<value>-1.1220</value>
				</product>
			</function>
			<function name="aero/coefficient/Cmdf">
				<description>Delta_pitching_moment_due_to_flap_deflection</description>
				<product>
					<property>aero/qbar-psf</property>
					<property>metrics/Sw-sqft</property>
					<property>metrics/cbarw-ft</property>
					<table>
						<independentVar>fcs/flap-pos-deg</independentVar>
						<tableData>
							0.0000 0.0000
							10.0000 -0.0654
							20.0000 -0.0981
							30.0000
							-0.1140
						</tableData>
					</table>
				</product>
			</function>
		</axis>

		<!-- To stay consistent, this section was also replaced with the c172 pitch
			axis data. -->

		<axis name="PITCH">
			<function name="aero/coefficient/Cmo">
				<description>Pitching_moment_at_zero_alpha</description>
				<product>
					<property>aero/qbar-psf</property>
					<property>metrics/Sw-sqft</property>
					<property>metrics/cbarw-ft</property>
					<value>0.1000</value>
				</product>
			</function>
			<function name="aero/coefficient/Cmalpha">
				<description>Pitch_moment_due_to_alpha</description>
				<product>
					<property>aero/qbar-psf</property>
					<property>metrics/Sw-sqft</property>
					<property>metrics/cbarw-ft</property>
					<property>aero/alpha-rad</property>
					<value>-1.8000</value>
				</product>
			</function>
			<function name="aero/coefficient/Cmq">
				<description>Pitch_moment_due_to_pitch_rate</description>
				<product>
					<property>aero/qbar-psf</property>
					<property>metrics/Sw-sqft</property>
					<property>metrics/cbarw-ft</property>
					<property>aero/ci2vel</property>
					<property>velocities/q-aero-rad_sec</property>
					<value>-12.4000</value>
				</product>
			</function>
			<function name="aero/coefficient/Cmadot">
				<description>Pitch_moment_due_to_alpha_rate</description>
				<product>
					<property>aero/qbar-psf</property>
					<property>metrics/Sw-sqft</property>
					<property>metrics/cbarw-ft</property>
					<property>aero/ci2vel</property>
					<property>aero/alphadot-rad_sec</property>
					<value>-7.2700</value>
				</product>
			</function>
			<function name="aero/coefficient/Cmde">
				<description>Pitch_moment_due_to_elevator_deflection</description>
				<product>
					<property>aero/qbar-psf</property>
					<property>metrics/Sw-sqft</property>
					<property>metrics/cbarw-ft</property>
					<property>fcs/elevator-pos-rad</property>
					<value>-1.1220</value>
				</product>
			</function>
			<function name="aero/coefficient/Cmdf">
				<description>Delta_pitching_moment_due_to_flap_deflection</description>
				<product>
					<property>aero/qbar-psf</property>
					<property>metrics/Sw-sqft</property>
					<property>metrics/cbarw-ft</property>
					<table>
						<independentVar>fcs/flap-pos-deg</independentVar>
						<tableData>
							0.0000 0.0000
							10.0000 -0.0654
							20.0000 -0.0981
							30.0000 -0.1140
						</tableData>
					</table>
				</product>
			</function>
		</axis>

		<!-- To stay consistent, the original yaw axis was replaced with the one
			from the c172. -->
		<axis name="YAW">
			<function name="aero/coefficient/Cnb">
				<description>Yaw_moment_due_to_beta</description>
				<product>
					<property>aero/qbar-psf</property>
					<property>metrics/Sw-sqft</property>
					<property>metrics/bw-ft</property>
					<table>
						<independentVar>aero/beta-rad</independentVar>
						<tableData>
							-0.3490 -0.0205
							0.0000 0.0000
							0.3490 0.0205
						</tableData>
					</table>
				</product>
			</function>
			<function name="aero/coefficient/Cnp">
				<description>Yaw_moment_due_to_roll_rate</description>
				<product>
					<property>aero/qbar-psf</property>
					<property>metrics/Sw-sqft</property>
					<property>metrics/bw-ft</property>
					<property>aero/bi2vel</property>
					<property>velocities/p-aero-rad_sec</property>
					<value>-0.0278</value>
				</product>
			</function>
			<function name="aero/coefficient/Cnr">
				<description>Yaw_moment_due_to_yaw_rate</description>
				<product>
					<property>aero/qbar-psf</property>
					<property>metrics/Sw-sqft</property>
					<property>metrics/bw-ft</property>
					<property>aero/bi2vel</property>
					<property>velocities/r-aero-rad_sec</property>
					<value>-0.0937</value>
				</product>
			</function>
			<function name="aero/coefficient/Cnda">
				<description>Yaw_moment_due_to_aileron</description>
				<product>
					<property>aero/qbar-psf</property>
					<property>metrics/Sw-sqft</property>
					<property>metrics/bw-ft</property>
					<property>fcs/left-aileron-pos-rad</property>
					<value>-0.0053</value>
				</product>
			</function>
			<function name="aero/coefficient/Cndr">
				<description>Yaw_moment_due_to_rudder</description>
				<product>
					<property>aero/qbar-psf</property>
					<property>metrics/Sw-sqft</property>
					<property>metrics/bw-ft</property>
					<property>fcs/rudder-pos-rad</property>
					<value>-0.0430</value>
				</product>
			</function>
		</axis>

		<!-- not sure why there is hinge moment data in here have to do some more
			digging to see if it's actually needed. The c172 file does not have hinge
			moments. -->

		<function name="aero/elev_hinge_moment_ft_lbs">
			<description>
				Elevator hinge moment in ft-lbs
				HM = q * S * Cbar * ( Ch0
				+ Cha*alpha + Chd*delta )
				Positive causes trailing edge down movement
				Ch0 is used to artifically trim HM to zero
			</description>
			<product>
				<property>aero/qbar-psf</property>
				<property>metrics/Sw-sqft</property>
				<value> .4492E-01</value>	<!-- surface area of elevator -->
				<value> .9414E-01</value>	<!-- MAC of elevator -->
				<sum>
					<!-- <property>aero/Ch0_elev</property> -->
					<product>
						<property>aero/alpha-deg</property>
						<table>                            	<!-- Ch-alpha -->
							<independentVar lookup="row">
								aero/alpha-deg</independentVar>
							<tableData>
								-16.00 .2169E-02
								-8.000 .2169E-02
								-6.000 .2169E-02
								-4.000 .2169E-02
								-2.000 .2169E-02
								.000 .2169E-02
								2.000 .2169E-02
								4.000 .2169E-02
								8.000 .2169E-02
								9.000 .2169E-02
								10.00 .1730E-01
								12.00 .1723E-01
								14.00 .1723E-01
								16.00 .1723E-01
								18.00 .1723E-01
								19.00 .1723E-01
								20.00 .1723E-01
								21.00 .1723E-01
								22.00 .1724E-01
								24.00 .1723E-01
							</tableData>
						</table>
					</product>
					<product>
						<property>fcs/elevator-pos-deg</property>
						<table>                            	<!-- Ch-delta elevator -->
							<independentVar lookup="row">
								fcs/elevator-pos-deg</independentVar>
							<tableData>
								-20.00 .1730E-01
								-15.00 .1723E-01
								-10.00 .1723E-01
								-5.000 .1723E-01
								.000 .1723E-01
								5.000 .1723E-01
								10.00 .1723E-01
								13.00 .1723E-01
								16.00 .1724E-01
							</tableData>
						</table>
					</product>
				</sum>
			</product>
		</function>
	</aerodynamics>
</fdm_config>
<!-- END OF FILE -->
